# Stage 3: tight minimisation, NVT and NPT at 300 K, CHARMM36m
# Run from this relaxation/ directory.
# Output: ../system_equilibrated.data

units           real
atom_style      full
boundary        p p p
bond_style      harmonic
angle_style     charmm
dihedral_style  charmmfsw
improper_style  harmonic
special_bonds   charmm
pair_style      lj/charmmfsw/coul/long 10.0 12.0

fix             cmap all cmap ../charmm36m.cmap
fix_modify      cmap energy yes
read_data       system_ramped.data fix cmap crossterm CMAP
include         ../protein_network.in.groups

neigh_modify    one 10000
pair_style      lj/charmmfsw/coul/long 10.0 12.0
pair_modify     mix arithmetic
kspace_style    pppm 1.0e-4
include         ../protein_network.in.settings

# Restrain peptide omega and CA chirality while overlaps are removed (physical backbone).
include         protein_network.in.omega

thermo          100
thermo_style    custom step pe ke etotal evdwl ecoul epair ebond eangle edihed eimp press vol temp

# Tight minimisation
min_style       cg
minimize        1.0e-6 1.0e-8 100000 1000000
write_data      system_minimized_final.data

# Short NVT (10 000 steps x 1 fs)
reset_timestep  0
variable        T equal 300
velocity        all create ${T} 12387
timestep        1.0
fix             1 all nvt temp ${T} ${T} 100.0
run             10000
unfix           1
write_data      after_nvt.data

# Short NPT (10 000 steps x 1 fs)
fix             1 all npt temp ${T} ${T} 100.0 iso 1.0 1.0 1000.0
run             10000
unfix           1
unfix           omega0
unfix           omega1

write_data      ../system_equilibrated.data
print "All stages complete."
