# Stage 3 -- Tight min + short NVT + (optional) NPT.
# MARTINI 3 port of the CHARMM stage 3 (same structure, same
# 1 fs timestep, same 100.0 Tdamp). MARTINI-specific changes are noted inline:
#   * pair_style lj/cut/coul/cut    (vs lj/charmm/coul/long + kspace pppm)
#   * dielectric 15.0               (RF approximation; MARTINI default)
#   * special_bonds lj/coul 0 1 1   (nrexcl=1: exclude 1-2 only, matching the
#     reference high_pro.itp + GROMACS; was 0 0 0 which OVER-excluded 1-3/1-4 and
#     let the proper sidechain geometry collapse during dynamics)
#   * angle_style cosine/squared    (MARTINI 3 IDP backbone funct=10)
#   * no fix cmap                   (CMAP is CHARMM-only)
#   * comm_modify cutoff 60         (MARTINI bonds longer than atomistic)
# Run from this relaxation/ directory.

units           real
boundary        p p p
atom_style      full
bond_style      harmonic
angle_style     cosine/squared
dihedral_style  charmm
improper_style  harmonic

pair_style      lj/cut/coul/cut 12.0    # MARTINI: was lj/charmm/coul/long + pppm
pair_modify     shift yes
special_bonds   lj 0.0 1.0 1.0 coul 0.0 1.0 1.0   # MARTINI: was special_bonds charmm
dielectric      15.0                              # MARTINI: RF approx (no equivalent in CHARMM)

read_data       system_ramped.data
include         ../protein_network.in.groups
include         ../protein_network.in.settings

neigh_modify    one 10000
comm_modify     mode single cutoff 60.0           # MARTINI: longer than CHARMM atomistic

thermo          100
thermo_style    custom step pe ke etotal evdwl ecoul epair ebond eangle edihed eimp press vol temp

# --- Tight minimisation (as in the CHARMM stage 3) ---
min_style       cg
minimize        1.0e-6 1.0e-8 100000 1000000
write_data      system_minimized_final.data

# --- Short NVT (5000 steps x 1 fs = 5 ps), T=310K is the MARTINI canonical ---
reset_timestep  0
variable        T equal 310.0                     # MARTINI: 310 K (the CHARMM stage 3 uses 300 K)
velocity        all create ${T} 12345
timestep        1.0                               # same as the CHARMM stage 3
fix             1 all nvt temp ${T} ${T} 100.0   # same Tdamp as CHARMM
run             5000
unfix           1
write_data      after_nvt.data

# --- Short NPT at 1 atm (5000 steps x 1 fs = 5 ps) ---
# OFF by default: for dry / vacuum boxes (no W water packed), NPT collapses
# the cell because there is no solvent pressure to balance against.
# UNCOMMENT for hydrated systems (--water-density > 0) to let the box find
# its natural MARTINI density.
#
# fix             1 all npt temp ${T} ${T} 100.0 iso 1.0 1.0 1000.0
# run             5000
# unfix           1

write_data      ../system_equilibrated.data
print           "Stage 3 done -> ../system_equilibrated.data (NVT-only; uncomment NPT block for hydrated runs)."
